Clear
New Circuit.modifiedieee34


Redirect Vsource.dss
Redirect LineCode.dss
Redirect LoadShape.dss
Redirect GrowthShape.dss
Redirect TCC_Curve.dss
Redirect Spectrum.dss
Redirect sub\Branches.dss
Redirect sub\Transformers.dss
Redirect sub\Shunts.dss
Redirect sub\Loads.dss
Redirect sub\Generators.dss
Redirect sub\Capacitors.dss
Redirect WindGen.dss
Redirect EnergyMeter.dss
MakeBusList
Redirect BusVoltageBases.dss  ! set voltage bases
Buscoords BusCoords.dss
GIScoords GISCoords.dss
