New "Line.l1" phases=3 bus1=800.1.2.3 bus2=802.1.2.3 linecode=300 Seasons=1 Ratings=[400,] normamps=400 emergamps=600 length=2.58 units=kft
New "Line.l2" phases=3 bus1=802.1.2.3 bus2=806.1.2.3 linecode=300 Seasons=1 Ratings=[400,] normamps=400 emergamps=600 length=1.73 units=kft
New "Line.l3" phases=3 bus1=806.1.2.3 bus2=808.1.2.3 linecode=300 Seasons=1 Ratings=[400,] normamps=400 emergamps=600 length=32.23 units=kft
New "Line.l5" phases=3 bus1=808.1.2.3 bus2=812.1.2.3 linecode=300 Seasons=1 Ratings=[400,] normamps=400 emergamps=600 length=37.5 units=kft
New "Line.l6" phases=3 bus1=812.1.2.3 bus2=814.1.2.3 linecode=300 Seasons=1 Ratings=[400,] normamps=400 emergamps=600 length=29.73 units=kft
New "Line.l7" phases=3 bus1=814r.1.2.3 bus2=850.1.2.3 linecode=301 Seasons=1 Ratings=[400,] normamps=400 emergamps=600 length=0.01 units=kft
New "Line.l24" phases=3 bus1=850.1.2.3 bus2=816.1.2.3 linecode=301 Seasons=1 Ratings=[400,] normamps=400 emergamps=600 length=0.31 units=kft
New "Line.l9" phases=3 bus1=816.1.2.3 bus2=824.1.2.3 linecode=301 Seasons=1 Ratings=[400,] normamps=400 emergamps=600 length=10.21 units=kft
New "Line.l13" phases=3 bus1=824.1.2.3 bus2=828.1.2.3 linecode=301 Seasons=1 Ratings=[400,] normamps=400 emergamps=600 length=0.84 units=kft
New "Line.l14" phases=3 bus1=828.1.2.3 bus2=830.1.2.3 linecode=301 Seasons=1 Ratings=[400,] normamps=400 emergamps=600 length=20.44 units=kft
New "Line.l15" phases=3 bus1=830.1.2.3 bus2=854.1.2.3 linecode=301 Seasons=1 Ratings=[400,] normamps=400 emergamps=600 length=0.52 units=kft
New "Line.l27" phases=3 bus1=854.1.2.3 bus2=852.1.2.3 linecode=301 Seasons=1 Ratings=[400,] normamps=400 emergamps=600 length=36.83 units=kft
New "Line.l25" phases=3 bus1=852r.1.2.3 bus2=832.1.2.3 linecode=301 Seasons=1 Ratings=[400,] normamps=400 emergamps=600 length=0.01 units=kft
New "Line.l32" phases=3 bus1=888.1.2.3 bus2=890.1.2.3 linecode=300 Seasons=1 Ratings=[400,] normamps=400 emergamps=600 length=10.56 units=kft
New "Line.l16" phases=3 bus1=832.1.2.3 bus2=858.1.2.3 linecode=301 Seasons=1 Ratings=[400,] normamps=400 emergamps=600 length=4.9 units=kft
New "Line.l29" phases=3 bus1=858.1.2.3 bus2=834.1.2.3 linecode=301 Seasons=1 Ratings=[400,] normamps=400 emergamps=600 length=5.83 units=kft
New "Line.l18" phases=3 bus1=834.1.2.3 bus2=842.1.2.3 linecode=301 Seasons=1 Ratings=[400,] normamps=400 emergamps=600 length=0.28 units=kft
New "Line.l21" phases=3 bus1=842.1.2.3 bus2=844.1.2.3 linecode=301 Seasons=1 Ratings=[400,] normamps=400 emergamps=600 length=1.35 units=kft
New "Line.l22" phases=3 bus1=844.1.2.3 bus2=846.1.2.3 linecode=301 Seasons=1 Ratings=[400,] normamps=400 emergamps=600 length=3.64 units=kft
New "Line.l23" phases=3 bus1=846.1.2.3 bus2=848.1.2.3 linecode=301 Seasons=1 Ratings=[400,] normamps=400 emergamps=600 length=0.53 units=kft
New "Line.l17" phases=3 bus1=834.1.2.3 bus2=860.1.2.3 linecode=301 Seasons=1 Ratings=[400,] normamps=400 emergamps=600 length=2.02 units=kft
New "Line.l30" phases=3 bus1=860.1.2.3 bus2=836.1.2.3 linecode=301 Seasons=1 Ratings=[400,] normamps=400 emergamps=600 length=2.68 units=kft
New "Line.l20" phases=3 bus1=836.1.2.3 bus2=862.1.2.3 linecode=301 Seasons=1 Ratings=[400,] normamps=400 emergamps=600 length=0.28 units=kft
New "Line.l31" phases=1 bus1=862.2 bus2=838.2 linecode=304 Seasons=1 Ratings=[400,] normamps=400 emergamps=600 length=4.86 units=kft
New "Line.l19" phases=3 bus1=836.1.2.3 bus2=840.1.2.3 linecode=301 Seasons=1 Ratings=[400,] normamps=400 emergamps=600 length=0.86 units=kft
New "Line.l28" phases=1 bus1=858.1 bus2=864.1 linecode=303 Seasons=1 Ratings=[400,] normamps=400 emergamps=600 length=1.62 units=kft
New "Line.l26" phases=1 bus1=854.2 bus2=856.2 linecode=303 Seasons=1 Ratings=[400,] normamps=400 emergamps=600 length=23.33 units=kft
New "Line.l12" phases=1 bus1=824.2 bus2=826.2 linecode=303 Seasons=1 Ratings=[400,] normamps=400 emergamps=600 length=3.03 units=kft
New "Line.l8" phases=1 bus1=816.1 bus2=818.1 linecode=302 Seasons=1 Ratings=[400,] normamps=400 emergamps=600 length=1.71 units=kft
New "Line.l10" phases=1 bus1=818.1 bus2=820.1 linecode=302 Seasons=1 Ratings=[400,] normamps=400 emergamps=600 length=48.15 units=kft
New "Line.l11" phases=1 bus1=820.1 bus2=822.1 linecode=302 Seasons=1 Ratings=[400,] normamps=400 emergamps=600 length=13.74 units=kft
New "Line.l4" phases=1 bus1=808.2 bus2=810.2 linecode=303 Seasons=1 Ratings=[400,] normamps=400 emergamps=600 length=5.804 units=kft
