New "Load.d802_806_b" bus1=806.2 phases=1 conn=wye model=1 kV=14.376 kW=30 kvar=15
New "Load.d802_806_c" bus1=806.3 phases=1 conn=wye model=1 kV=14.376 kW=25 kvar=14
New "Load.d816_824_b" bus1=824.2.3 phases=1 conn=delta model=5 kV=24.9 kW=5 kvar=2
New "Load.d824_828_c" bus1=828.3 phases=1 conn=wye model=1 kV=14.376 kW=4 kvar=2
New "Load.d828_830_a" bus1=830.1 phases=1 conn=wye model=1 kV=14.376 kW=7 kvar=3
New "Load.s830_a" bus1=830.1.2 phases=1 conn=delta model=2 kV=24.9 kW=10 kvar=5
New "Load.s830_b" bus1=830.2.3 phases=1 conn=delta model=2 kV=24.9 kW=10 kvar=5
New "Load.s830_c" bus1=830.3.1 phases=1 conn=delta model=2 kV=24.9 kW=25 kvar=10
New "Load.s890_a" bus1=890.1.2 phases=1 conn=delta model=5 kV=4.16 kW=150 kvar=75
New "Load.s890_b" bus1=890.2.3 phases=1 conn=delta model=5 kV=4.16 kW=150 kvar=75
New "Load.s890_c" bus1=890.3.1 phases=1 conn=delta model=5 kV=4.16 kW=150 kvar=75
New "Load.d832_858_a" bus1=858.1.2 phases=1 conn=delta model=2 kV=24.9 kW=7 kvar=3
New "Load.d832_858_b" bus1=858.2.3 phases=1 conn=delta model=2 kV=24.9 kW=2 kvar=1
New "Load.d832_858_c" bus1=858.3.1 phases=1 conn=delta model=2 kV=24.9 kW=6 kvar=3
New "Load.d858_834_a" bus1=834.1.2 phases=1 conn=delta model=1 kV=24.9 kW=4 kvar=2
New "Load.d858_834_b" bus1=834.2.3 phases=1 conn=delta model=1 kV=24.9 kW=15 kvar=8
New "Load.d858_834_c" bus1=834.3.1 phases=1 conn=delta model=1 kV=24.9 kW=13 kvar=7
New "Load.d842_844_a" bus1=844.1 phases=1 conn=wye model=1 kV=14.376 kW=9 kvar=5
New "Load.s844_a" bus1=844.1 phases=1 conn=wye model=2 kV=14.376 kW=135 kvar=105
New "Load.s844_b" bus1=844.2 phases=1 conn=wye model=2 kV=14.376 kW=135 kvar=105
New "Load.s844_c" bus1=844.3 phases=1 conn=wye model=2 kV=14.376 kW=135 kvar=105
New "Load.d844_846_b" bus1=846.2 phases=1 conn=wye model=1 kV=14.376 kW=25 kvar=12
New "Load.d844_846_c" bus1=846.3 phases=1 conn=wye model=1 kV=14.376 kW=20 kvar=11
New "Load.d846_848_b" bus1=848.2 phases=1 conn=wye model=1 kV=14.376 kW=23 kvar=11
New "Load.s848_a" bus1=848.1.2 phases=1 conn=delta model=1 kV=24.9 kW=20 kvar=16
New "Load.s848_b" bus1=848.2.3 phases=1 conn=delta model=1 kV=24.9 kW=20 kvar=16
New "Load.s848_c" bus1=848.3.1 phases=1 conn=delta model=1 kV=24.9 kW=20 kvar=16
New "Load.d834_860_a" bus1=860.1.2 phases=1 conn=delta model=2 kV=24.9 kW=16 kvar=8
New "Load.d834_860_b" bus1=860.2.3 phases=1 conn=delta model=2 kV=24.9 kW=20 kvar=10
New "Load.d834_860_c" bus1=860.3.1 phases=1 conn=delta model=2 kV=24.9 kW=110 kvar=55
New "Load.s860_a" bus1=860.1 phases=1 conn=wye model=1 kV=14.376 kW=20 kvar=16
New "Load.s860_b" bus1=860.2 phases=1 conn=wye model=1 kV=14.376 kW=20 kvar=16
New "Load.s860_c" bus1=860.3 phases=1 conn=wye model=1 kV=14.376 kW=20 kvar=16
New "Load.d860_836_a" bus1=836.1.2 phases=1 conn=delta model=1 kV=24.9 kW=30 kvar=15
New "Load.d860_836_b" bus1=836.2.3 phases=1 conn=delta model=1 kV=24.9 kW=10 kvar=6
New "Load.d860_836_c" bus1=836.3.1 phases=1 conn=delta model=1 kV=24.9 kW=42 kvar=22
New "Load.d862_838_b" bus1=838.2 phases=1 conn=wye model=1 kV=14.376 kW=28 kvar=14
New "Load.d836_840_a" bus1=840.1.2 phases=1 conn=delta model=5 kV=24.9 kW=18 kvar=9
New "Load.d836_840_b" bus1=840.2.3 phases=1 conn=delta model=5 kV=24.9 kW=22 kvar=11
New "Load.s840_a" bus1=840.1 phases=1 conn=wye model=5 kV=14.376 kW=9 kvar=7
New "Load.s840_b" bus1=840.2 phases=1 conn=wye model=5 kV=14.376 kW=9 kvar=7
New "Load.s840_c" bus1=840.3 phases=1 conn=wye model=5 kV=14.376 kW=9 kvar=7
New "Load.d858_864_a" bus1=864.1 phases=1 conn=wye model=1 kV=14.376 kW=2 kvar=1
New "Load.d854_856_b" bus1=856.2 phases=1 conn=wye model=1 kV=14.376 kW=4 kvar=2
New "Load.d824_826_b" bus1=826.2 phases=1 conn=wye model=5 kV=14.376 kW=40 kvar=20
New "Load.d818_820_a" bus1=820.1 phases=1 conn=wye model=2 kV=14.376 kW=34 kvar=17
New "Load.d820_822_a" bus1=822.1 phases=1 conn=wye model=1 kV=14.376 kW=135 kvar=70
New "Load.d808_810_b" bus1=810.2 phases=1 conn=wye model=5 kV=14.376 kW=16 kvar=8
